// SBML level 3 version 2

model synthetic_data()

  // Compartments:
  compartment Falcon_Tube = 10 u0;

  // Species:
  species $Enzyme in Falcon_Tube;
  species Substrate in Falcon_Tube;
  species Product in Falcon_Tube;

  // Reactions:
  Example_Reaction: Substrate => Product; vmax*Substrate/(Km + Substrate);  // modifiers: Enzyme
    vmax = 15 u4; Km = 10 u1;

  // Unit definitions:
  unit u0 = 1e-3 litre; u0 is "ml";
  unit u1 = 1e-3 mole / (10 litre); u1 is "mmole / l";
  unit u2 = 10 kelvin; u2 is "K";
  unit u3 = 600 second; u3 is "min";
  unit u4 = 10 mole / (10 litre * 10 second); u4 is "mole / l s";
end
